*Heading
** PARTS
**
*Part, name=dogbone
*Node
      1,         -7.5,   19.3649158,  0.400000006
      2,           0.,   19.3649158,  0.400000006
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*Element, type=C3D20R
   1,    13,   438,  3175,  2750,     1,    90,  2827,  2738, 10952, 10951, 10950, 10949, 10953, 10954, 10955,
      10956, 10958, 10957, 10959, 10960
   2,    14,   439,  3176,  2751,    13,   438,  3175,  2750, 10964, 10963, 10962, 10961, 10952, 10951, 10950,
      10949, 10966, 10965, 10967, 10968
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*Nset, nset=Set-1, generate
     1,  40487,      1
*Elset, elset=Set-1, generate
    1,  7788,     1
** Section: dogbone
*Solid Section, elset=Set-1, material=material
,
*End Part
**
**
** ASSEMBLY
**
*Assembly, name=Assembly
**
*Instance, name=dogbone-1, part=dogbone
*End Instance
**
*Nset, nset=Set-3, instance=dogbone-1, generate
     1,  40487,      1
*Elset, elset=Set-3, instance=dogbone-1, generate
    1,  7788,     1
*Nset, nset=Set-4, instance=dogbone-1, generate
     1,  40487,      1
*Elset, elset=Set-4, instance=dogbone-1, generate
    1,  7788,     1
*Nset, nset=Set-5, instance=dogbone-1, generate
     1,  40487,      1
*Elset, elset=Set-5, instance=dogbone-1, generate
    1,  7788,     1
*Nset, nset=Set-6, instance=dogbone-1
     5,     6,     9,    10,    11,    12
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*Elset, elset=Set-6, instance=dogbone-1
 1299, 1300, 1301, 1302, 1303, 1304
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*Nset, nset=Set-7, instance=dogbone-1
     1,     2,     3,     4,     7,     8
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*Elset, elset=Set-7, instance=dogbone-1
    1,    2,    3,    4,    5,    6
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*End Assembly
**
** MATERIALS
**
** ** 301 Stainless Steel 3/4 Harden Version 3
** ** Properties: Elasticity (RT), Plasticity (RT)
** ** Unit:  N - mm  (mass ton/mm^3)
** ** Source: Test Willich A Gabener
*Material, name=material
*Density
 7.9e-09,
*Elastic
170000., 0.28
** ----------------------------------------------------------------
**
** STEP: tension
**
*Step, name=tension, nlgeom=YES, inc=1000
*Static, direct
0.01, 1.,
**
** BOUNDARY CONDITIONS
**
** Name: BC-1 Type: Symmetry/Antisymmetry/Encastre
*Boundary
Set-6, ENCASTRE
** Name: BC-2 Type: Displacement/Rotation
*Boundary
Set-7, 2, 2, 0.25
**
** OUTPUT REQUESTS
**
*Restart, write, frequency=0
**
** FIELD OUTPUT: F-Output-1
**
*Output, field, variable=PRESELECT
**
** HISTORY OUTPUT: H-Output-1
**
*Output, history, variable=PRESELECT
*End Step
** ----------------------------------------------------------------
**
** STEP: compression
**
*Step, name=compression, nlgeom=YES, inc=1000
Release of load
*Static, direct
0.01, 1.,
**
** OUTPUT REQUESTS
**
*Restart, write, frequency=0
**
** FIELD OUTPUT: F-Output-1
**
*Output, field, variable=PRESELECT
**
** HISTORY OUTPUT: H-Output-1
**
*Output, history, variable=PRESELECT
*End Step
